// SBML level 2 version 4

function Constant_flux__irreversible(v)
  v;
end
Constant_flux__irreversible is "Constant flux (irreversible)";

function pH_1s_Logistic__1(substrate1, k, enhancer, pH, pHlimit)
  substrate1*k/(1 + exp(-enhancer*(pH - pHlimit)));
end
pH_1s_Logistic__1 is "pH-1s-Logistic [1]";

function pH_2sLogistic(substrate1, substrate2, k, enhancer, pH, pHlimit)
  substrate1*substrate2*k/(1 + exp(-enhancer*(pH - pHlimit)));
end
pH_2sLogistic is "pH-2sLogistic";

model AntigenPresentation()
  // Del paper de LODISH PNAS
  // Agredo dos reacciones
  // FreeFe con parámetros aproximados de Fig 2 t1/2 =1.5 min
  // FreeTf con parámetros donde se establece que apoTf (TfaEn) no pega a pH neutro al receptor t1/2 = 16 sec
  // Ojo, como Tfa está en otro compartimiento (soluble) más grande, esto afecta tramendamente a la k cinética. Para lograr ese t1/2 subí la k a 1E5
  // De paper The Journal of Experimental Medicine Volume 180 October 1994 1471-1483
  // obtengo kon y koff para SIINFKL (a pH 7.4 y T 25oC0
  // De paper Garstka et al. 10.1073/pnas.1416543112 obtengo que kon no se modifica mucho con T y que koff aumenta 5 veces (usan otro péptido y otra técnica, pero los valores no son tan distintos)
  // Con ello tomo a pH 7.4 y T 37 que es la que supone el paper
  // kon = 6E6 1/mM seg
  // koff = 1E-5*5 1/seg
  // Para ajustar que haya binding a 7.4 de acuerdo a estas ks pero no haya a pH5 uso dos logísticas
  // kmax/(1+EXP(-enhancer*(pH-pHlimit))
  // para kon uso kmax 6E6, enhancer 6.4 pHlimit 6.5
  // para koff uso kmax 0.02, enhancer -9.2 pHlimit 5.4
  // pH se controlacon RabD y RabA no con vATPase y NOX
  // El cerrado de MHC con péptido (forma pepMHC) o sin péptido (forma cMHC) tendrían la misma k. Esto es como si los péptidos inespecíficos fueran 1 mM siempre y en todo compartimiento. Para corregir esto supongo uM y hago kmax/1000 para la reacción
  // oMHCI -> cMHCI
  // Elimino vATPAse y NOX como metabolitos. Con esto alivio las series y el programa corrió 180.000 ticks
  // elimino lyEnz y todas las hidrólisis. La degradación corre por cuenta de de la clase de Lysosomal Digestion Step de Repast
  // import y export no dependen de pH como antes

  // Compartments:
  compartment soluble = 4800000000;
  compartment membrane = 2400000;
  compartment imaginario = 1;

  // Species:
  species ovaEn in soluble = 0;
  species exCxEn in membrane = 0;
  species ovaCy in soluble = 0;
  species pepEn in soluble = 0;
  species oMHCIEn in membrane = 0;
  species pepMHCIEn in membrane = 0;
  species protonEn in soluble = 0.0001;
  species protonCy in soluble = 0;
  species cMHCIEn in membrane = 0;
  species pepCy in soluble = 0;
  species imCxEn in membrane = 0;
  species RabD in imaginario = 0;
  species RabA in imaginario = 0;
  species R_TfaEn in membrane = 0; R_TfaEn is "R-TfaEn";
  species REn in membrane = 0;
  species TfaEn in soluble = 0;
  species R_TfEn in membrane = 1; R_TfEn is "R-TfEn";

  // Parameters:
  kpH = 0.0002;
  enhancer = 6.4;
  acidpH = 5.4;
  alkpH = 6.5;
  enhancerNegative = -9.2;
  Metabolite_12_0 = RabA; Metabolite_12_0 is "Initial for RabA";
  Metabolite_11_0 = RabD; Metabolite_11_0 is "Initial for RabD";

  // Assignment rules:
  pH := -ln(protonEn*0.001)/ln(10);
  RabDpump := Metabolite_11_0*0.0008;
  RabApump := Metabolite_12_0*1e-5;

  // Reactions:
  OVAout: ovaEn + exCxEn => ovaCy + exCxEn; OVAout_k1*ovaEn*exCxEn;
    OVAout_k1 = 1000000;
  MHCI_loading: oMHCIEn + pepEn => pepMHCIEn; pH_2sLogistic(oMHCIEn, pepEn, MHCI_loading_k, enhancer, pH, alkpH); MHCI_loading is "MHCI-loading";
    MHCI_loading_k = 6000000;
  ProtonPumpRabD: => protonEn; soluble*Constant_flux__irreversible(RabDpump);
  ProtonLeak: protonCy -> protonEn; soluble*(ProtonLeak_k1*protonCy - k2*protonEn);
    ProtonLeak_k1 = 0.04; k2 = 0.04;
  MHCIopening: cMHCIEn => oMHCIEn; membrane*pH_1s_Logistic__1(cMHCIEn, MHCIopening_k, enhancerNegative, pH, acidpH);
    MHCIopening_k = 6000;
  MHCI_peptOpening: pepMHCIEn => oMHCIEn + pepEn; pH_1s_Logistic__1(pepMHCIEn, MHCI_peptOpening_k, enhancerNegative, pH, acidpH); MHCI_peptOpening is "MHCI-peptOpening";
    MHCI_peptOpening_k = 6000;
  ProtonPumpRabA: => protonEn; soluble*Constant_flux__irreversible(RabApump);
  MHCIclosing: oMHCIEn => cMHCIEn; membrane*pH_1s_Logistic__1(oMHCIEn, MHCIclosing_k, enhancer, pH, alkpH);
    MHCIclosing_k = 6000;
  pepImport: pepCy + imCxEn => pepEn + imCxEn; pepImport_k1*pepCy*imCxEn;
    pepImport_k1 = 100000;
  proteosome: ovaCy => pepCy; soluble*proteosome_k1*ovaCy;
    proteosome_k1 = 0.01;
  FreeTf: R_TfaEn => REn + TfaEn; pH_1s_Logistic__1(R_TfaEn, FreeTf_k, FreeTf_enhancer, pH, FreeTf_pHlimit);
    FreeTf_k = 100000; FreeTf_enhancer = 18; FreeTf_pHlimit = 7.3;
  FreeFe: R_TfEn => R_TfaEn; membrane*pH_1s_Logistic__1(R_TfEn, FreeFe_k, FreeFe_enhancer, pH, FreeFe_pHlimit);
    FreeFe_k = 0.766; FreeFe_enhancer = -9; FreeFe_pHlimit = 5.7;

  // Unit definitions:
  unit length = 1e-9 metre;
  unit area = (1e-9 metre)^2;
  unit volume = 1e-3 litre;
  unit substance = 1e-3 mole;
end
